# Lammps script to read in mBuild topologies and perform energy minimization
# Initialization
units           real
boundary        p p p
atom_style      full

# Assume ff info is included in data file
pair_style     lj/cut/coul/cut ${rcut} # read in from job.sp.r_cut
bond_style  none
angle_style none
dihedral_style  none
read_restart production-npt.restart

pair_modify shift no  #TODO: Look to make sure this shift is okay

neighbor        2.5 bin #skin cutoff

timestep ${tstep}
variable runtime equal 5e6/dt
thermo 1000
thermo_style custom step temp press pe epair emol ke etotal density

variable tsample equal ${T} #kelvin, modified by job.sp.temperature
variable psample equal ${P}/101.325 #kPa to atm modified by job.sp.pressure
# ________________________________________________________________________________________


# Production
variable startstep equal step
variable t equal temp
variable pressure equal press
variable e equal etotal
variable p equal pe
variable k equal ke
variable d equal density
variable filename string "prlog-nvt.txt"
fix output_data all print 1000 "${startstep} ${t} ${pressure} $e $p $k $d" file ${filename} title "step temp press etotal pe ke density"
dump traj1 all dcd 10000 prod-nvt.dcd
fix integrator all nvt temp ${tsample} ${tsample} 100.0
fix zeromom all momentum 100 linear 1 1 1 rescale
run 3000000
unfix integrator
write_restart production-nvt.restart
undump traj1
